// SBML level 3 version 2

model adaptive_resistance()
  // model units - time: hour

  // Compartments:
  compartment central = 1 liter;

  // Species:
  species drug in central = 0;  // substance in mg

  // Parameters:
  bacterial_count_adapted = 1 cfu_per_ml;
  bacterial_count_susceptible = 1 cfu_per_ml;
  concentration_e50_adapted = 1 mg_per_liter;
  elimination_rate = 1 per_hour;
  gamma = 1 dimensionless;
  growth_rate = 1 per_hour;
  kappa_adapted = 1 per_hour;
  kappa_susceptible = 1 liter_per_mg_hour;
  mutation_rate = 1 liter_per_mg_hour;
  total_bacterial_count has cfu_per_ml;

  // Assignment rules:
  total_bacterial_count := bacterial_count_susceptible + bacterial_count_adapted;

  // Rate rules:
  bacterial_count_susceptible' = (growth_rate - (kappa_susceptible*drug + mutation_rate*drug))*bacterial_count_susceptible;
  bacterial_count_adapted' = (growth_rate - kappa_adapted*(drug^gamma/(drug^gamma + concentration_e50_adapted^gamma)))*bacterial_count_adapted + mutation_rate*drug*bacterial_count_susceptible;

  // Reactions:
  central_reaction: drug => ; central*elimination_rate*drug;

  // Unit definitions:
  unit cfu_per_ml = item / liter;
  unit mg_per_liter = 1e-3 gram / liter;
  unit hour = 3600 second;
  unit mg = 1e-3 gram;
  unit per_hour = 1 / (3600 second);
  unit liter_per_mg_hour = liter / (1e-3 gram * 3600 second);
end
