// SBML level 2 version 4

model TwoComp()
  // TwoComp
  // Model constructed with PKModelDesign with compartments: Central: Administration = 'Infusion', Elimination = 'linear-clearance', HasResponse = true, HasLag = false Peripheral: Administration = '', Elimination = '', HasResponse = false, HasLag = false

  // Compartments:
  compartment Central = 1 MWBUILTINUNIT_liter;
  compartment Peripheral = 1 MWBUILTINUNIT_liter;

  // Species:
  substanceOnly species Dose_Central in Central = 0;  // substance in MWBUILTINPREFIX_milli_MWBUILTINUNIT_gram
  species Drug_Central in Central = 0;  // substance in MWBUILTINPREFIX_milli_MWBUILTINUNIT_gram
  substanceOnly species Dose_Peripheral in Peripheral = 0;  // substance in MWBUILTINPREFIX_milli_MWBUILTINUNIT_gram
  species Drug_Peripheral in Peripheral = 0;  // substance in MWBUILTINPREFIX_milli_MWBUILTINUNIT_gram

  // Parameters:
  ka_Central = 0 MWDERIVEDUNIT_1__hour;
  Tk0_Central = 1 MWBUILTINUNIT_hour;
  TLag_Central = 1 MWBUILTINUNIT_hour;
  Cl_Central = 1 MWDERIVEDUNIT_liter__hour;
  ke_Central = Cl_Central/Central; ke_Central has MWDERIVEDUNIT_1__hour;
  ka_Peripheral = 0 MWDERIVEDUNIT_1__hour;
  Tk0_Peripheral = 1 MWBUILTINUNIT_hour;
  TLag_Peripheral = 1 MWBUILTINUNIT_hour;
  Q12 = 1 MWDERIVEDUNIT_liter__hour;
  k12 = Q12/Central; k12 has MWDERIVEDUNIT_1__hour;
  k21 = Q12/Peripheral; k21 has MWDERIVEDUNIT_1__hour;

  // Reactions:
  Central_Absorption: Dose_Central => Drug_Central; ka_Central*Dose_Central;
  Central_Elimination: Drug_Central => ; ke_Central*Drug_Central*Central;
  Peripheral_Absorption: Dose_Peripheral => Drug_Peripheral; ka_Peripheral*Dose_Peripheral;
  Central_Peripheral_Transport: Drug_Central -> Drug_Peripheral; k12*Drug_Central*Central - k21*Drug_Peripheral*Peripheral; Central_Peripheral_Transport is "Central <-> Peripheral Transport";

  // Unit definitions:
  unit MWBUILTINUNIT_liter = metre^3 * 1e-3 dimensionless;
  unit MWBUILTINPREFIX_milli_MWBUILTINUNIT_gram = 1e-3 gram; MWBUILTINPREFIX_milli_MWBUILTINUNIT_gram is "milligram";
  unit MWDERIVEDUNIT_1__hour = 2.777778e-4 dimensionless / second; MWDERIVEDUNIT_1__hour is "1/hour";
  unit MWBUILTINUNIT_hour = 3600 second;
  unit MWDERIVEDUNIT_liter__hour = metre^3 * 2.777778e-7 dimensionless / second; MWDERIVEDUNIT_liter__hour is "liter/hour";
end
