// SBML level 2 version 3

model Noble1962_HodgkinHuxleyEquation()
  // This a model from the article:
  // A modification of the Hodgkin--Huxley equations applicable to Purkinje fibre action and pace-maker potentials.
  // NOBLE D. J Physiol. 1962;160:317-52. 14480151 ,
  // Abstract:
  // No Abstract Available
  // This model was taken from the CellML repository and automatically converted to SBML.
  // The original model was: Noble. (1962) - version05
  // The original CellML model was created by:
  // Lloyd, Catherine, May
  // c.lloyd@auckland.ac.nz
  // The University of Auckland
  // Auckland Bioengineering Institute
  // This model originates from BioModels Database: A Database of Annotated Published Models (http://www.ebi.ac.uk/biomodels/). It is copyright (c) 2005-2011 The BioModels.net Team.
  // To the extent possible under law, all copyright and related or neighbouring rights to this encoded model have been dedicated to the public domain worldwide. Please refer to CC0 Public Domain Dedication for more information.
  // In summary, you are entitled to use this encoded model in absolutely any manner you deem suitable, verbatim, or with modification, alone or embedded it in a larger context, redistribute it, commercially or not, in a restricted way or not..
  // To cite BioModels Database, please use: Li C, Donizelli M, Rodriguez N, Dharuri H, Endler L, Chelliah V, Li L, He E, Henry A, Stefan MI, Snoep JL, Hucka M, Le Novère N, Laibe C (2010) BioModels Database: An enhanced, curated and annotated resource for published quantitative kinetic models. BMC Syst Biol., 4:92.
  // biomodels.db:MODEL8686121468
  // isDescribedBy pubmed:14480151
  // hasTaxon taxonomy:6618
  // occursIn BTO:0001735

  // Compartments:
  compartment Compartment = 1 litre;

  // Parameters:
  V_membrane = cn(); V_membrane has millivolt;
  Cm = cn(); Cm has microF;
  i_Na has nanoA;
  g_Na_max = 400000 microS;
  g_Na has microS;
  E_Na = 40 millivolt;
  m = cn(); m has dimensionless;
  alpha_m has per_second;
  beta_m has per_second;
  V_sodium_channel_m_gate has millivolt;
  time_sodium_channel_m_gate has second;
  h = 0.8 dimensionless;
  alpha_h has per_second;
  beta_h has per_second;
  V_sodium_channel_h_gate has millivolt;
  time_sodium_channel_h_gate has second;
  i_K has nanoA;
  g_K1 has microS;
  g_K2 has microS;
  n = 0.01 dimensionless;
  alpha_n has per_second;
  beta_n has per_second;
  V_potassium_channel_n_gate has millivolt;
  time_potassium_channel_n_gate has second;
  i_Leak has nanoA;
  g_L = 75 microS;
  E_L = -60 millivolt;

  // Assignment rules:
  g_Na := m^3*h*g_Na_max;
  i_Na := (g_Na + 140)*(V_membrane - E_Na);
  alpha_m := 100*(-V_sodium_channel_m_gate - 48)/(exp((-V_sodium_channel_m_gate - 48)/15) - 1);
  beta_m := 120*(V_sodium_channel_m_gate + 8)/(exp((V_sodium_channel_m_gate + 8)/5) - 1);
  alpha_h := 170*exp((-V_sodium_channel_h_gate - 90)/20);
  beta_h := 1000/(1 + exp((-V_sodium_channel_h_gate - 42)/10));
  i_K := (g_K1 + g_K2)*(V_membrane + 100);
  g_K1 := 1200*exp((-V_membrane - 90)/50) + 15*exp((V_membrane + 90)/60);
  g_K2 := 1200*n^4;
  alpha_n := 0.1*(-V_potassium_channel_n_gate - 50)/(exp((-V_potassium_channel_n_gate - 50)/10) - 1);
  beta_n := 2*exp((-V_potassium_channel_n_gate - 90)/80);
  i_Leak := g_L*(V_membrane - E_L);

  // Rate rules:
  V_membrane' = -(i_Na + i_K + i_Leak)/Cm;
  m' = alpha_m*(1 - m) - beta_m*m;
  h' = alpha_h*(1 - h) - beta_h*h;
  n' = alpha_n*(1 - n) - beta_n*n;

  // Unit definitions:
  unit strang_unit = 1 / (1000 second); strang_unit is "strange_unit";
  unit per_second = 1 / second;
  unit millivolt = 1e-3 volt;
  unit per_millivolt = 1 / (1e-3 volt);
  unit per_millivolt_second = 1 / (1e-3 volt * second);
  unit microS = 1e-6 siemens;
  unit microF = 1e-6 farad;
  unit nanoA = 1e-9 ampere;
end
